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/COM,ANSYS RELEASE 2022 R2           BUILD 22.2BETA  UP20220515       08:28:23
/PREP7
/TITLE,minimal_model--Static Structural (B3)
ANTYPE, 0
EQSLV,SPAR,  0.00000000    ,,0
TOFFST,  273.150000
DMPOPT,ESAV,NO
DMPOPT,EMAT,NO
*IF,_CDRDOFF,EQ,1,THEN     !if solid model was read in
_CDRDOFF=             !reset flag, numoffs already performed
*ELSE              !offset database for the following FE model
NUMOFF,NODE,       18
NUMOFF,ELEM,       29
NUMOFF,MAT ,        6
NUMOFF,REAL,       11
NUMOFF,SECN,        7
NUMOFF,TYPE,       12
NUMOFF,CSYS,       13
*ENDIF
*SET,ANSINTER_,  2.000000000000
*SET,CID     ,  11.00000000000
*SET,TEMPERATURE,'TEMP                            '
*SET,TID     ,  12.00000000000
*SET,_ASMDIAG,  28.28427124746
*SET,_BUTTON ,  0.000000000000
*SET,_MAXELEMNUM,  29.00000000000
*SET,_MAXELEMTYPE,  12.00000000000
*SET,_MAXNODENUM,  18.00000000000
*SET,_MAXREALCONST,  11.00000000000
*SET,_NPILOT ,  18.00000000000
*SET,_NPILOT81,  17.00000000000
*SET,_NPILOT84,  18.00000000000
*SET,_NUMELEM,  27.00000000000
*SET,_NUMNODE,  18.00000000000
*SET,_RETURN ,  0.000000000000
*SET,_STATUS ,  1.000000000000
*SET,_THICKRATIO,  0.000000000000
*SET,_UIQR   ,  1.000000000000
*SET,_WALLBSOL,  8.465277777778
*SET,_WALLSTRT,  8.465277777778
*SET,_WB_PROJECTSCRATCH_DIR(1,       1,       1),'D:\tmp\_ProjectScratch\Scr22A7\                                                                                                                                                                                                                         '
*SET,_WB_SOLVERFILES_DIR(1,       1,       1),'D:\tmp\minimal_model_files\dp0\SYS\MECH\                                                                                                                                                                                                                '
*SET,_WB_USERFILES_DIR(1,       1,       1),'D:\tmp\minimal_model_files\user_files\                                                                                                                                                                                                                  '
*SET,_XMAX   ,  10.00000000000
*SET,_XMIN   , -10.00000000000
*SET,_YMAX   ,  0.000000000000
*SET,_YMIN   ,  0.000000000000
*SET,_ZMAX   ,  10.00000000000
*SET,_ZMIN   , -10.00000000000
DOF,DELETE
ET,        1,181
KEYOP,        1, 3,        2
KEYOP,        1, 8,        2
ET,        9,175
KEYOP,        9, 2,        2
KEYOP,        9, 4,        1
KEYOP,        9,12,        5
ET,       10,170
KEYOP,       10, 2,        1
KEYOP,       10, 4,   111111
ET,       11,175
KEYOP,       11, 2,        2
KEYOP,       11, 4,        1
KEYOP,       11,12,        5
ET,       12,170
KEYOP,       12, 2,        1
KEYOP,       12, 4,   111111
DOF,ROTX,ROTY,ROTZ,
RLBLOCK,       2,      11,       6,       7
(2i8,6g16.9)
(7g16.9)
       9       6  0.00000000      0.00000000      0.00000000      0.00000000      0.00000000      0.00000000
      11       6  0.00000000      0.00000000      0.00000000      0.00000000      0.00000000      0.00000000
LOCAL,UNBL,LOC,      12, 0,  0.00000000    ,  0.00000000    ,  0.00000000
LOCAL,UNBL,ANG,      12, 0,  0.00000000    ,  0.00000000    ,  0.00000000
LOCAL,UNBL,PRM,      12, 0,  1.00000000    ,  1.00000000
CSCIR,      12,       0,       0
LOCAL,UNBL,LOC,      13, 0, -6.66666822    ,  0.00000000    , -6.66667724
LOCAL,UNBL,ANG,      13, 0, -90.0000000    , -90.0000000    , -90.0000000
LOCAL,UNBL,PRM,      13, 0,  1.00000000    ,  1.00000000
CSCIR,      13,       0,       0
CSYS,   0
MAT ,       11
TYPE,       12
REAL,       11
NBLOCK,6,SOLID,        18,        18
(3i9,6e21.13e3)
        1        0        0-1.0000000000000E+001 0.0000000000000E+000-1.0000000000000E+001
        2        0        0 1.0000000000000E+001 0.0000000000000E+000-1.0000000000000E+001
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N,UNBL,LOC,       -1,
EBLOCK,19,SOLID,        29,        27
(19i10)
         1         1         1         7        13         0         0         0         4         0         1        13         5         1         7
         1         1         1         7        13         0         0         0         4         0         2         7         8        16        13
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        -1
CMBLOCK,BOTTOM_LEFT,ELEM,       4  ! users element component definition
(8i10)
         2         3         8         9
CMBLOCK,ED_FRONT,NODE,       4  ! users node component definition
(8i10)
         1         3         7         8
CMBLOCK,ED_TAIL,NODE,       4  ! users node component definition
(8i10)
         2         4         9        10
CMBLOCK,FRONT,ELEM,       3  ! users element component definition
(8i10)
         1         2         9
CMBLOCK,MIDDLE,ELEM,       3  ! users element component definition
(8i10)
         3         4         8
CMBLOCK,REMOTEDISPALL,NODE,       2  ! users node component definition
(8i10)
        17        18
CMBLOCK,TAIL,ELEM,       3  ! users element component definition
(8i10)
         5         6         7
CMBLOCK,TOP_RIGHT,ELEM,       4  ! users element component definition
(8i10)
         3         4         5         6
CMBLOCK,_CM_EXT_SEC_0,ELEM,       9  ! users element component definition
(8i10)
         1         2         3         4         5         6         7         8
         9
MPTEMP,UNBL, 1, 1,  0.00000000    ,
MPDATA,UNBL, 1,EX  ,       1, 1,  1.00000000    ,
MPTEMP,UNBL, 1, 1,  0.00000000    ,
MPDATA,UNBL, 1,EY  ,       1, 1,  1.00000000    ,
MPTEMP,UNBL, 1, 1,  0.00000000    ,
MPDATA,UNBL, 1,EZ  ,       1, 1,  255.000000    ,
MPTEMP,UNBL, 1, 1,  0.00000000    ,
MPDATA,UNBL, 1,GXY ,       1, 1, 1.000000000E-06,
MPTEMP,UNBL, 1, 1,  0.00000000    ,
MPDATA,UNBL, 1,GYZ ,       1, 1,  37.0000000    ,
MPTEMP,UNBL, 1, 1,  0.00000000    ,
MPDATA,UNBL, 1,GXZ ,       1, 1,  70.0000000    ,
MPTEMP,UNBL, 1, 1,  0.00000000    ,
MPDATA,UNBL, 1,DENS,       1, 1, 8.000000000E-11,
MPTEMP,UNBL, 1, 1,  0.00000000    ,
MPDATA,UNBL, 1,PRXY,       1, 1, 0.490000000    ,
MPTEMP,UNBL, 1, 1,  0.00000000    ,
MPDATA,UNBL, 1,PRYZ,       1, 1, 1.000000000E-03,
MPTEMP,UNBL, 1, 1,  0.00000000    ,
MPDATA,UNBL, 1,PRXZ,       1, 1, 1.000000000E-03,
MPTEMP,UNBL,16, 1,  1.00000000    ,  2.00000000    ,  3.00000000
MPTEMP,UNBL,16, 4,  4.00000000    ,  5.00000000    ,  6.00000000
MPTEMP,UNBL,16, 7,  7.00000000    ,  8.00000000    ,  9.00000000
MPTEMP,UNBL,16,10,  10.0000000    ,  11.0000000    ,  12.0000000
MPTEMP,UNBL,16,13,  13.0000000    ,  14.0000000    ,  15.0000000
MPTEMP,UNBL,16,16,  16.0000000    ,
MPDATA,UNBL,16,UMID,       1, 1, 929248307.0    , 859321955.0    , 761541943.0
MPDATA,UNBL,16,UMID,       1, 4, 1697461297.    , 909716834.0    , 1714567213.
MPDATA,UNBL,16,UMID,       1, 7, 825636660.0    , 1701012792.    , 809067317.0
MPDATA,UNBL,16,UMID,       1,10, 538976288.0    , 538976288.0    , 538976288.0
MPDATA,UNBL,16,UMID,       1,13, 538976288.0    , 538976288.0    , 538976288.0
MPDATA,UNBL,16,UMID,       1,16, 538976288.0    ,
MPTEMP,UNBL,16, 1,  1.00000000    ,  2.00000000    ,  3.00000000
MPTEMP,UNBL,16, 4,  4.00000000    ,  5.00000000    ,  6.00000000
MPTEMP,UNBL,16, 7,  7.00000000    ,  8.00000000    ,  9.00000000
MPTEMP,UNBL,16,10,  10.0000000    ,  11.0000000    ,  12.0000000
MPTEMP,UNBL,16,13,  13.0000000    ,  14.0000000    ,  15.0000000
MPTEMP,UNBL,16,16,  16.0000000    ,
MPDATA,UNBL,16,UVID,       1, 1, 808923186.0    , 1697920565.    , 761345843.0
MPDATA,UNBL,16,UVID,       1, 4, 959263843.0    , 912403768.0    , 892690989.0
MPDATA,UNBL,16,UVID,       1, 7, 842282596.0    , 1647404336.    , 879114598.0
MPDATA,UNBL,16,UVID,       1,10, 538976288.0    , 538976288.0    , 538976288.0
MPDATA,UNBL,16,UVID,       1,13, 538976288.0    , 538976288.0    , 538976288.0
MPDATA,UNBL,16,UVID,       1,16, 538976288.0    ,
MPTEMP,UNBL, 1, 1,  0.00000000    ,
MPDATA,UNBL, 1,EX  ,       2, 1,  61340.0000    ,
MPTEMP,UNBL, 1, 1,  0.00000000    ,
MPDATA,UNBL, 1,EY  ,       2, 1,  61340.0000    ,
MPTEMP,UNBL, 1, 1,  0.00000000    ,
MPDATA,UNBL, 1,EZ  ,       2, 1,  6900.00000    ,
MPTEMP,UNBL, 1, 1,  0.00000000    ,
MPDATA,UNBL, 1,GXY ,       2, 1,  3300.00000    ,
MPTEMP,UNBL, 1, 1,  0.00000000    ,
MPDATA,UNBL, 1,GYZ ,       2, 1,  2700.00000    ,
MPTEMP,UNBL, 1, 1,  0.00000000    ,
MPDATA,UNBL, 1,GXZ ,       2, 1,  2700.00000    ,
MPTEMP,UNBL, 1, 1,  0.00000000    ,
MPDATA,UNBL, 1,ALPX,       2, 1, 2.200000000E-06,
MPTEMP,UNBL, 1, 1,  0.00000000    ,
MPDATA,UNBL, 1,ALPY,       2, 1, 2.200000000E-06,
MPTEMP,UNBL, 1, 1,  0.00000000    ,
MPDATA,UNBL, 1,ALPZ,       2, 1, 1.000000000E-05,
MPTEMP,UNBL, 1, 1,  0.00000000    ,
MPDATA,UNBL, 1,DENS,       2, 1, 1.420000000E-09,
MPTEMP,UNBL, 1, 1,  0.00000000    ,
MPDATA,UNBL, 1,PRXY,       2, 1, 4.000000000E-02,
MPTEMP,UNBL, 1, 1,  0.00000000    ,
MPDATA,UNBL, 1,PRYZ,       2, 1, 0.300000000    ,
MPTEMP,UNBL, 1, 1,  0.00000000    ,
MPDATA,UNBL, 1,PRXZ,       2, 1, 0.300000000    ,
MPTEMP,UNBL,16, 1,  1.00000000    ,  2.00000000    ,  3.00000000
MPTEMP,UNBL,16, 4,  4.00000000    ,  5.00000000    ,  6.00000000
MPTEMP,UNBL,16, 7,  7.00000000    ,  8.00000000    ,  9.00000000
MPTEMP,UNBL,16,10,  10.0000000    ,  11.0000000    ,  12.0000000
MPTEMP,UNBL,16,13,  13.0000000    ,  14.0000000    ,  15.0000000
MPTEMP,UNBL,16,16,  16.0000000    ,
MPDATA,UNBL,16,UMID,       2, 1, 875586868.0    , 895824436.0    , 761672550.0
MPDATA,UNBL,16,UMID,       2, 4, 858600498.0    , 862268769.0    , 809067053.0
MPDATA,UNBL,16,UMID,       2, 7, 909337145.0    , 962933093.0    , 962880613.0
MPDATA,UNBL,16,UMID,       2,10, 538976288.0    , 538976288.0    , 538976288.0
MPDATA,UNBL,16,UMID,       2,13, 538976288.0    , 538976288.0    , 538976288.0
MPDATA,UNBL,16,UMID,       2,16, 538976288.0    ,
MPTEMP,UNBL,16, 1,  1.00000000    ,  2.00000000    ,  3.00000000
MPTEMP,UNBL,16, 4,  4.00000000    ,  5.00000000    ,  6.00000000
MPTEMP,UNBL,16, 7,  7.00000000    ,  8.00000000    ,  9.00000000
MPTEMP,UNBL,16,10,  10.0000000    ,  11.0000000    ,  12.0000000
MPTEMP,UNBL,16,13,  13.0000000    ,  14.0000000    ,  15.0000000
MPTEMP,UNBL,16,16,  16.0000000    ,
MPDATA,UNBL,16,UVID,       2, 1, 895575653.0    , 1650615654.    , 758276708.0
MPDATA,UNBL,16,UVID,       2, 4, 1663906873.    , 1650797881.    , 942826797.0
MPDATA,UNBL,16,UVID,       2, 7, 845297764.0    , 895564080.0    , 1664169272.
MPDATA,UNBL,16,UVID,       2,10, 538976288.0    , 538976288.0    , 538976288.0
MPDATA,UNBL,16,UVID,       2,13, 538976288.0    , 538976288.0    , 538976288.0
MPDATA,UNBL,16,UVID,       2,16, 538976288.0    ,
MPTEMP,UNBL, 1, 1,  0.00000000    ,
MPDATA,UNBL, 1,EX  ,       3, 1,  121000.000    ,
MPTEMP,UNBL, 1, 1,  0.00000000    ,
MPDATA,UNBL, 1,EY  ,       3, 1,  8600.00000    ,
MPTEMP,UNBL, 1, 1,  0.00000000    ,
MPDATA,UNBL, 1,EZ  ,       3, 1,  8600.00000    ,
MPTEMP,UNBL, 1, 1,  0.00000000    ,
MPDATA,UNBL, 1,GXY ,       3, 1,  4700.00000    ,
MPTEMP,UNBL, 1, 1,  0.00000000    ,
MPDATA,UNBL, 1,GYZ ,       3, 1,  3100.00000    ,
MPTEMP,UNBL, 1, 1,  0.00000000    ,
MPDATA,UNBL, 1,GXZ ,       3, 1,  4700.00000    ,
MPTEMP,UNBL, 1, 1,  0.00000000    ,
MPDATA,UNBL, 1,ALPX,       3, 1,-4.700000000E-07,
MPTEMP,UNBL, 1, 1,  0.00000000    ,
MPDATA,UNBL, 1,ALPY,       3, 1, 3.000000000E-05,
MPTEMP,UNBL, 1, 1,  0.00000000    ,
MPDATA,UNBL, 1,ALPZ,       3, 1, 3.000000000E-05,
MPTEMP,UNBL, 1, 1,  0.00000000    ,
MPDATA,UNBL, 1,DENS,       3, 1, 1.490000000E-09,
MPTEMP,UNBL, 1, 1,  0.00000000    ,
MPDATA,UNBL, 1,PRXY,       3, 1, 0.270000000    ,
MPTEMP,UNBL, 1, 1,  0.00000000    ,
MPDATA,UNBL, 1,PRYZ,       3, 1, 0.400000000    ,
MPTEMP,UNBL, 1, 1,  0.00000000    ,
MPDATA,UNBL, 1,PRXZ,       3, 1, 0.270000000    ,
MPTEMP,UNBL,16, 1,  1.00000000    ,  2.00000000    ,  3.00000000
MPTEMP,UNBL,16, 4,  4.00000000    ,  5.00000000    ,  6.00000000
MPTEMP,UNBL,16, 7,  7.00000000    ,  8.00000000    ,  9.00000000
MPTEMP,UNBL,16,10,  10.0000000    ,  11.0000000    ,  12.0000000
MPTEMP,UNBL,16,13,  13.0000000    ,  14.0000000    ,  15.0000000
MPTEMP,UNBL,16,16,  16.0000000    ,
MPDATA,UNBL,16,UMID,       3, 1, 1697788726.    , 1664431459.    , 761607266.0
MPDATA,UNBL,16,UMID,       3, 4, 841823282.0    , 862137656.0    , 842412589.0
MPDATA,UNBL,16,UMID,       3, 7, 845374052.0    , 895836980.0    , 859256674.0
MPDATA,UNBL,16,UMID,       3,10, 538976288.0    , 538976288.0    , 538976288.0
MPDATA,UNBL,16,UMID,       3,13, 538976288.0    , 538976288.0    , 538976288.0
MPDATA,UNBL,16,UMID,       3,16, 538976288.0    ,
MPTEMP,UNBL,16, 1,  1.00000000    ,  2.00000000    ,  3.00000000
MPTEMP,UNBL,16, 4,  4.00000000    ,  5.00000000    ,  6.00000000
MPTEMP,UNBL,16, 7,  7.00000000    ,  8.00000000    ,  9.00000000
MPTEMP,UNBL,16,10,  10.0000000    ,  11.0000000    ,  12.0000000
MPTEMP,UNBL,16,13,  13.0000000    ,  14.0000000    ,  15.0000000
MPTEMP,UNBL,16,16,  16.0000000    ,
MPDATA,UNBL,16,UVID,       3, 1, 1633957428.    , 811675703.0    , 758263905.0
MPDATA,UNBL,16,UVID,       3, 4, 892154936.0    , 808856929.0    , 879112749.0
MPDATA,UNBL,16,UVID,       3, 7, 808989795.0    , 926299236.0    , 1647522401.
MPDATA,UNBL,16,UVID,       3,10, 538976288.0    , 538976288.0    , 538976288.0
MPDATA,UNBL,16,UVID,       3,13, 538976288.0    , 538976288.0    , 538976288.0
MPDATA,UNBL,16,UVID,       3,16, 538976288.0    ,
MPTEMP,UNBL, 1, 1,  0.00000000    ,
MPDATA,UNBL, 1,EX  ,       4, 1,  1.00000000    ,
MPTEMP,UNBL, 1, 1,  0.00000000    ,
MPDATA,UNBL, 1,EY  ,       4, 1,  1.00000000    ,
MPTEMP,UNBL, 1, 1,  0.00000000    ,
MPDATA,UNBL, 1,EZ  ,       4, 1,  255.000000    ,
MPTEMP,UNBL, 1, 1,  0.00000000    ,
MPDATA,UNBL, 1,GXY ,       4, 1, 1.000000000E-06,
MPTEMP,UNBL, 1, 1,  0.00000000    ,
MPDATA,UNBL, 1,GYZ ,       4, 1,  37.0000000    ,
MPTEMP,UNBL, 1, 1,  0.00000000    ,
MPDATA,UNBL, 1,GXZ ,       4, 1,  70.0000000    ,
MPTEMP,UNBL, 1, 1,  0.00000000    ,
MPDATA,UNBL, 1,DENS,       4, 1, 8.000000000E-11,
MPTEMP,UNBL, 1, 1,  0.00000000    ,
MPDATA,UNBL, 1,PRXY,       4, 1, 0.490000000    ,
MPTEMP,UNBL, 1, 1,  0.00000000    ,
MPDATA,UNBL, 1,PRYZ,       4, 1, 1.000000000E-03,
MPTEMP,UNBL, 1, 1,  0.00000000    ,
MPDATA,UNBL, 1,PRXZ,       4, 1, 1.000000000E-03,
MPTEMP,UNBL,16, 1,  1.00000000    ,  2.00000000    ,  3.00000000
MPTEMP,UNBL,16, 4,  4.00000000    ,  5.00000000    ,  6.00000000
MPTEMP,UNBL,16, 7,  7.00000000    ,  8.00000000    ,  9.00000000
MPTEMP,UNBL,16,10,  10.0000000    ,  11.0000000    ,  12.0000000
MPTEMP,UNBL,16,13,  13.0000000    ,  14.0000000    ,  15.0000000
MPTEMP,UNBL,16,16,  16.0000000    ,
MPDATA,UNBL,16,UMID,       4, 1, 929248307.0    , 859321955.0    , 761541943.0
MPDATA,UNBL,16,UMID,       4, 4, 1697461297.    , 909716834.0    , 1714567213.
MPDATA,UNBL,16,UMID,       4, 7, 825636660.0    , 1701012792.    , 809067317.0
MPDATA,UNBL,16,UMID,       4,10, 538976288.0    , 538976288.0    , 538976288.0
MPDATA,UNBL,16,UMID,       4,13, 538976288.0    , 538976288.0    , 538976288.0
MPDATA,UNBL,16,UMID,       4,16, 538976288.0    ,
MPTEMP,UNBL,16, 1,  1.00000000    ,  2.00000000    ,  3.00000000
MPTEMP,UNBL,16, 4,  4.00000000    ,  5.00000000    ,  6.00000000
MPTEMP,UNBL,16, 7,  7.00000000    ,  8.00000000    ,  9.00000000
MPTEMP,UNBL,16,10,  10.0000000    ,  11.0000000    ,  12.0000000
MPTEMP,UNBL,16,13,  13.0000000    ,  14.0000000    ,  15.0000000
MPTEMP,UNBL,16,16,  16.0000000    ,
MPDATA,UNBL,16,UVID,       4, 1, 808923186.0    , 1697920565.    , 761345843.0
MPDATA,UNBL,16,UVID,       4, 4, 959263843.0    , 912403768.0    , 892690989.0
MPDATA,UNBL,16,UVID,       4, 7, 842282596.0    , 1647404336.    , 879114598.0
MPDATA,UNBL,16,UVID,       4,10, 538976288.0    , 538976288.0    , 538976288.0
MPDATA,UNBL,16,UVID,       4,13, 538976288.0    , 538976288.0    , 538976288.0
MPDATA,UNBL,16,UVID,       4,16, 538976288.0    ,
MPTEMP,UNBL, 1, 1,  0.00000000    ,
MPDATA,UNBL, 1,EX  ,       5, 1,  200000.000    ,
MPTEMP,UNBL, 1, 1,  0.00000000    ,
MPDATA,UNBL, 1,NUXY,       5, 1, 0.300000000    ,
MPTEMP,UNBL, 1, 1,  0.00000000    ,
MPDATA,UNBL, 1,ALPX,       5, 1, 1.200000000E-05,
MPTEMP,UNBL, 1, 1,  0.00000000    ,
MPDATA,UNBL, 1,DENS,       5, 1, 7.850000000E-09,
MPTEMP,UNBL, 1, 1,  0.00000000    ,
MPDATA,UNBL, 1,KXX ,       5, 1,  60.5000000    ,
MPTEMP,UNBL, 1, 1,  0.00000000    ,
MPDATA,UNBL, 1,RSVX,       5, 1, 1.700000000E-04,
MPTEMP,UNBL, 1, 1,  0.00000000    ,
MPDATA,UNBL, 1,C   ,       5, 1,  434000000.    ,
MPTEMP,UNBL, 1, 1,  0.00000000    ,
MPDATA,UNBL, 1,MURX,       5, 1,  10000.0000    ,
MPTEMP,UNBL,16, 1,  1.00000000    ,  2.00000000    ,  3.00000000
MPTEMP,UNBL,16, 4,  4.00000000    ,  5.00000000    ,  6.00000000
MPTEMP,UNBL,16, 7,  7.00000000    ,  8.00000000    ,  9.00000000
MPTEMP,UNBL,16,10,  10.0000000    ,  11.0000000    ,  12.0000000
MPTEMP,UNBL,16,13,  13.0000000    ,  14.0000000    ,  15.0000000
MPTEMP,UNBL,16,16,  16.0000000    ,
MPDATA,UNBL,16,UMID,       5, 1, 892940336.0    , 845231929.0    , 758591843.0
MPDATA,UNBL,16,UMID,       5, 4, 841823282.0    , 946154809.0    , 808870445.0
MPDATA,UNBL,16,UMID,       5, 7, 892691511.0    , 1684170085.    , 825241701.0
MPDATA,UNBL,16,UMID,       5,10, 538976288.0    , 538976288.0    , 538976288.0
MPDATA,UNBL,16,UMID,       5,13, 538976288.0    , 538976288.0    , 538976288.0
MPDATA,UNBL,16,UMID,       5,16, 538976288.0    ,
MPTEMP,UNBL,16, 1,  1.00000000    ,  2.00000000    ,  3.00000000
MPTEMP,UNBL,16, 4,  4.00000000    ,  5.00000000    ,  6.00000000
MPTEMP,UNBL,16, 7,  7.00000000    ,  8.00000000    ,  9.00000000
MPTEMP,UNBL,16,10,  10.0000000    ,  11.0000000    ,  12.0000000
MPTEMP,UNBL,16,13,  13.0000000    ,  14.0000000    ,  15.0000000
MPTEMP,UNBL,16,16,  16.0000000    ,
MPDATA,UNBL,16,UVID,       5, 1, 862206051.0    , 1664693094.    , 758736179.0
MPDATA,UNBL,16,UVID,       5, 4, 908932150.0    , 909192504.0    , 892416813.0
MPDATA,UNBL,16,UVID,       5, 7, 1667576121.    , 1630954292.    , 1667588663.
MPDATA,UNBL,16,UVID,       5,10, 538976288.0    , 538976288.0    , 538976288.0
MPDATA,UNBL,16,UVID,       5,13, 538976288.0    , 538976288.0    , 538976288.0
MPDATA,UNBL,16,UVID,       5,16, 538976288.0    ,
MPTEMP,UNBL, 1, 1,  0.00000000    ,
MPDATA,UNBL, 1,EX  ,       6, 1,  3780.00000    ,
MPTEMP,UNBL, 1, 1,  0.00000000    ,
MPDATA,UNBL, 1,NUXY,       6, 1, 0.350000000    ,
MPTEMP,UNBL, 1, 1,  0.00000000    ,
MPDATA,UNBL, 1,DENS,       6, 1, 1.160000000E-09,
MPTEMP,UNBL,16, 1,  1.00000000    ,  2.00000000    ,  3.00000000
MPTEMP,UNBL,16, 4,  4.00000000    ,  5.00000000    ,  6.00000000
MPTEMP,UNBL,16, 7,  7.00000000    ,  8.00000000    ,  9.00000000
MPTEMP,UNBL,16,10,  10.0000000    ,  11.0000000    ,  12.0000000
MPTEMP,UNBL,16,13,  13.0000000    ,  14.0000000    ,  15.0000000
MPTEMP,UNBL,16,16,  16.0000000    ,
MPDATA,UNBL,16,UMID,       6, 1, 1664694585.    , 943219255.0    , 758277218.0
MPDATA,UNBL,16,UMID,       6, 4, 1647129653.    , 811806049.0    , 1701196845.
MPDATA,UNBL,16,UMID,       6, 7, 1701013093.    , 875652453.0    , 1647523890.
MPDATA,UNBL,16,UMID,       6,10, 538976288.0    , 538976288.0    , 538976288.0
MPDATA,UNBL,16,UMID,       6,13, 538976288.0    , 538976288.0    , 538976288.0
MPDATA,UNBL,16,UMID,       6,16, 538976288.0    ,
MPTEMP,UNBL,16, 1,  1.00000000    ,  2.00000000    ,  3.00000000
MPTEMP,UNBL,16, 4,  4.00000000    ,  5.00000000    ,  6.00000000
MPTEMP,UNBL,16, 7,  7.00000000    ,  8.00000000    ,  9.00000000
MPTEMP,UNBL,16,10,  10.0000000    ,  11.0000000    ,  12.0000000
MPTEMP,UNBL,16,13,  13.0000000    ,  14.0000000    ,  15.0000000
MPTEMP,UNBL,16,16,  16.0000000    ,
MPDATA,UNBL,16,UVID,       6, 1, 878850358.0    , 842346808.0    , 758276705.0
MPDATA,UNBL,16,UVID,       6, 4, 942486577.0    , 1633955170.    , 1633892141.
MPDATA,UNBL,16,UVID,       6, 7, 962670692.0    , 909468978.0    , 1631008609.
MPDATA,UNBL,16,UVID,       6,10, 538976288.0    , 538976288.0    , 538976288.0
MPDATA,UNBL,16,UVID,       6,13, 538976288.0    , 538976288.0    , 538976288.0
MPDATA,UNBL,16,UVID,       6,16, 538976288.0    ,
SECTYPE,        1,SHELL,    ,
SECOFFSET,MID
SECBLOCK,      1
     0.010000,         0,     0.000000,         3
SECCONTROL,  0.0000    ,  0.0000    ,  0.0000    ,  0.0000    ,  1.0000    ,  1.0000    ,  1.0000    ,  1.0000    ,,,,  0.0000
TB,FCLI,       1,   1,  20,STRS
TBFIELD,Temps,0.000000
TBDATA,1,0.000000e+00,0.000000e+00,0.000000e+00
TBDATA,4,0.000000e+00,5.310000e+00,-5.310000e+00
TBDATA,7,0.000000e+00,1.210000e+00,2.240000e+00
TBDATA,10,0.000000e+00,0.000000e+00,0.000000e+00
TBDATA,13,0.000000e+00,0.000000e+00,0.000000e+00
TBDATA,16,0.000000e+00,0.000000e+00,0.000000e+00
TBDATA,19,0.000000e+00,0.000000e+00
TBIN,NORM,1
TBIN,CACH,0
TBIN,QUAN,0
TBIN,DEFA,temp,0.00000e+00
TBIN,XRES,temp,1
TB,FCLI,       2,   1,   9,STRN
TBFIELD,Temps,0.000000
TBDATA,1,1.260000e-02,-1.020000e-02,1.260000e-02
TBDATA,4,-1.020000e-02,8.000000e-03,-1.200000e-02
TBDATA,7,2.200000e-02,1.900000e-02,0.000000e+00
TBIN,NORM,1
TBIN,CACH,0
TBIN,QUAN,0
TBIN,DEFA,temp,0.00000e+00
TBIN,XRES,temp,1
TB,FCLI,       2,   1,  20,STRS
TBFIELD,Temps,0.000000
TBDATA,1,8.050000e+02,-5.090000e+02,8.050000e+02
TBDATA,4,-5.090000e+02,5.000000e+01,-1.700000e+02
TBDATA,7,1.250000e+02,6.500000e+01,6.500000e+01
TBDATA,10,-1.000000e+00,-1.000000e+00,-1.000000e+00
TBDATA,13,0.000000e+00,0.000000e+00,0.000000e+00
TBDATA,16,0.000000e+00,0.000000e+00,0.000000e+00
TBDATA,19,0.000000e+00,0.000000e+00
TBIN,NORM,1
TBIN,CACH,0
TBIN,QUAN,0
TBIN,DEFA,temp,0.00000e+00
TBIN,XRES,temp,1
TB,FCLI,       3,   1,   9,STRN
TBFIELD,Temps,0.000000
TBDATA,1,1.670000e-02,-1.080000e-02,3.200000e-03
TBDATA,4,-1.920000e-02,3.200000e-03,-1.920000e-02
TBDATA,7,1.200000e-02,1.100000e-02,0.000000e+00
TBIN,NORM,1
TBIN,CACH,0
TBIN,QUAN,0
TBIN,DEFA,temp,0.00000e+00
TBIN,XRES,temp,1
TB,FCLI,       3,   1,  20,STRS
TBFIELD,Temps,0.000000
TBDATA,1,2.231000e+03,-1.082000e+03,2.900000e+01
TBDATA,4,-1.000000e+02,2.900000e+01,-1.000000e+02
TBDATA,7,6.000000e+01,3.200000e+01,6.000000e+01
TBDATA,10,-1.000000e+00,-1.000000e+00,-1.000000e+00
TBDATA,13,3.500000e-01,3.000000e-01,2.500000e-01
TBDATA,16,2.500000e-01,0.000000e+00,0.000000e+00
TBDATA,19,0.000000e+00,0.000000e+00
TBIN,NORM,1
TBIN,CACH,0
TBIN,QUAN,0
TBIN,DEFA,temp,0.00000e+00
TBIN,XRES,temp,1
TB,FCLI,       4,   1,  20,STRS
TBFIELD,Temps,0.000000
TBDATA,1,0.000000e+00,0.000000e+00,0.000000e+00
TBDATA,4,0.000000e+00,5.310000e+00,-5.310000e+00
TBDATA,7,0.000000e+00,1.210000e+00,2.240000e+00
TBDATA,10,0.000000e+00,0.000000e+00,0.000000e+00
TBDATA,13,0.000000e+00,0.000000e+00,0.000000e+00
TBDATA,16,0.000000e+00,0.000000e+00,0.000000e+00
TBDATA,19,0.000000e+00,0.000000e+00
TBIN,NORM,1
TBIN,CACH,0
TBIN,QUAN,0
TBIN,DEFA,temp,0.00000e+00
TBIN,XRES,temp,1
EXTOPT,ATTR,      0,      0,      0
EXTOPT,ESIZE,  0,  0.0000
EXTOPT,ACLEAR,      0
TREF,  22.0000000
IRLF,  0
BFUNIF,TEMP,_TINY
ACEL,  0.00000000    ,  0.00000000    ,  0.00000000
OMEGA,  0.00000000    ,  0.00000000    ,  0.00000000
DOMEGA,  0.00000000    ,  0.00000000    ,  0.00000000
CGLOC,  0.00000000    ,  0.00000000    ,  0.00000000
CGOMEGA,  0.00000000    ,  0.00000000    ,  0.00000000
DCGOMG,  0.00000000    ,  0.00000000    ,  0.00000000
NLDIAG,EFLG,OFF
NLDIAG,NRRE,OFF
NLDIAG,CONT,ITER

NSUBST,         1,         1,         1,
KUSE,     0
TIME,  1.00000000
ALPHAD,  0.00000000
BETAD,  0.00000000
DMPRAT,  0.00000000
DMPSTR,  0.00000000

CRPLIM, 0.100000000    ,   0
CRPLIM,  0.00000000    ,   1
NCNV,     1,  0.00000000    ,     0,  0.00000000    ,  0.00000000
NEQIT,     0

ERESX,DEFA
OUTRES, ALL,NONE,
OUTRES,NSOL, ALL,
OUTRES,RSOL, ALL,
OUTRES,EANG, ALL,
OUTRES,ETMP, ALL,
OUTRES,VENG, ALL,
OUTRES,STRS, ALL,
OUTRES,EPEL, ALL,
OUTRES,EPPL, ALL,
OUTRES,CONT, ALL,
D,     17,UX  ,  0.00000000    ,  0.00000000
D,     17,UY  ,  0.00000000    ,  0.00000000
D,     17,UZ  ,  0.00000000    ,  0.00000000
D,     17,ROTX,  0.00000000    ,  0.00000000
D,     17,ROTY,  0.00000000    ,  0.00000000
D,     17,ROTZ,  0.00000000    ,  0.00000000
D,     18,UX  , 0.200000000    ,  0.00000000
D,     18,UZ  , 0.100000000    ,  0.00000000
FINISH
