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/batch
! ANSYS input file written by Workbench version 2024 R2
! File used for geometry attach: D:\tmp\wb_parameters_example8_files\dp0\global\MECH\SYS-4\AssembledModel\SYS-4.pmdb
/title,wb_parameters_example8--Static Structural (D3)
/COM,/COM,     ANSYSMotion, 2024.2
/com,--- Data in consistent MKS units. See Solving Units in the help system for more information.
/units,MKS
/prep7
! Turn off shape checking because checks already performed inside WB mesher.
! See help system for more information.
SHPP,OFF,,NOWARN
etcon,set             ! allow ANSYS to choose best KEYOP's for 180x elements, resets any applicable keyopt to MAPDL defaults
/com,*********** Nodes for the whole assembly ***********
nblock,3,,3665
(1i9,3e20.9e3)
        1     1.270000000E-01     3.048000000E-02     3.048000000E-01
        2     1.270000000E-01     9.652000000E-02     3.048000000E-01
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/com,*********** Nodes for all Remote Points ***********
nblock,3
(1i9,3e20.9e3)
     3333     6.349554967E-02     6.349554967E-02     3.048000038E-01
     3334     6.349554967E-02     6.349554967E-02     0.000000000E+00
/com,*********** Elements for Body 1 "ACP-Pre\Surface Body(ACP (Pre))(Mechanical Model)" ***********
et,1,181
keyo,1,1,0          ! bending and membrane stiffness
keyo,1,3,2
eblock,19,solid,,3264
(19i9)
        1        1        1        1        0        0        0        0        4        0        1     2000     1569      358       15
        1        1        1        1        0        0        0        0        4        0        2     1999     1616     1569     2000
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-1
/com,*********** Send User Defined Coordinate System(s) ***********
local,12,0,0.,0.,0.,0.,0.,0.
local,13,0,0.,0.,0.,0.,0.,0.
csys,0
toffst,273.15,      ! Temperature offset from absolute zero
/com,*********** Set Reference Temperature ***********
tref,22.
/com,*********** Send Materials ***********
MP,DENS,1,1420,	! kg m^-3
MP,EX,1,61340000000,	! Pa
MP,EY,1,61340000000,	! Pa
MP,EZ,1,6900000000,	! Pa
MP,PRXY,1,0.04,
MP,PRYZ,1,0.3,
MP,PRXZ,1,0.3,
MP,GXY,1,19500000000,	! Pa
MP,GYZ,1,2700000000,	! Pa
MP,GXZ,1,2700000000,	! Pa

TB,FCLI,1,1,9,2
TBDATA,1,0.0126,-0.0102,0.0126,-0.0102,0.0126,-0.0102
TBDATA,7,0.019,0.014,0.019
MP,ALPX,1,2.2e-06,	! C^-1
MP,ALPY,1,2.2e-06,	! C^-1
MP,ALPZ,1,1e-05,	! C^-1

TB,FCLI,1,1,20,1
TBDATA,1,805000000
TBDATA,2,-509000000
TBDATA,3,805000000
TBDATA,4,-509000000
TBDATA,5,50000000
TBDATA,6,-170000000
TBDATA,7,125000000
TBDATA,8,65000000
TBDATA,9,65000000
TBDATA,10,-1
TBDATA,11,-1
TBDATA,12,-1

/com,*********** Send Sheet Properties ***********
sectype,1,shell
secdata,1.e-009
secoff,mid

!************************* Model Summary ********************
!ACP-Pre\Surface Body(ACP (Pre))(Mechanical Model),	Epoxy_Carbon_Woven_230GPa_Prepreg,	matid,	1
!************************* End Model Summary ********************
/com,*********** Send Named Selection as Node Component ***********
CMBLOCK,NS_SUPPORT,NODE,       68
(8i10)
         1         2         5         6        11        12        15        16
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/com,*********** Send Named Selection as Node Component ***********
CMBLOCK,NS_LOAD ,NODE,       68
(8i10)
         3         4         7         8         9        10        13        14
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/com,*********** Create Remote Point "Internal Remote Point" ***********
! -------- Remote Point Used by "Remote Displacement Support" --------
*set,tid,3
*set,cid,2
et,cid,177
et,tid,170
keyo,tid,2,1               ! Don't fix the pilot node
keyo,tid,4,111111
keyo,cid,12,5              ! Bonded Contact
keyo,cid,4,0               ! Rigid CERIG style load
keyo,cid,2,2               ! MPC style contact
eblock,10,,,68
(15i9)
     3267        2        2        2        0        2     3332
     3268        2        2        2        0     3332     3331
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-1
*set,_npilot,3333
_npilot129=_npilot
type,tid
mat ,cid
real,cid
tshape,pilo
en,3335,_npilot
tshape
/com,*********** Create Remote Point "Internal Remote Point 2" ***********
! -------- Remote Point Used by "Remote Displacement" --------
*set,tid,5
*set,cid,4
et,cid,177
et,tid,170
keyo,tid,2,1               ! Don't fix the pilot node
keyo,tid,4,111111
keyo,cid,12,5              ! Bonded Contact
keyo,cid,4,0               ! Rigid CERIG style load
keyo,cid,2,2               ! MPC style contact
eblock,10,,,68
(15i9)
     3336        4        4        4        0        3     3315
     3337        4        4        4        0     3315     3316
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-1
*set,_npilot,3334
_npilot137=_npilot
type,tid
mat ,cid
real,cid
tshape,pilo
en,3404,_npilot
tshape
/com,*********** Construct Remote Displacement ***********
/com,*********** Construct Remote Displacement ***********

*DIM,_loadvari136ux,TABLE,3,1,1,TIME, , , 0
! Time values
*TAXIS,_loadvari136ux(1),1,0.,1.,2.
! Load values
_loadvari136ux(1,1,1) = 0.
_loadvari136ux(2,1,1) = 0.
_loadvari136ux(3,1,1) = 0.


*DIM,_loadvari136rotx,TABLE,3,1,1,TIME, , , 0
! Time values
*TAXIS,_loadvari136rotx(1),1,0.,1.,2.
! Load values
_loadvari136rotx(1,1,1) = 0.
_loadvari136rotx(2,1,1) = 3.49065850398866e-002
_loadvari136rotx(3,1,1) = 0.


*DIM,_loadvari136rotz,TABLE,3,1,1,TIME, , , 0
! Time values
*TAXIS,_loadvari136rotz(1),1,0.,1.,2.
! Load values
_loadvari136rotz(1,1,1) = 0.
_loadvari136rotz(2,1,1) = 0.
_loadvari136rotz(3,1,1) = 2.26892802759263e-002


/COM,*** Create a component for all remote displacements ***
CMBLOCK,REMOTEDISPALL,NODE,        2
(8i10)
      3333      3334

fini
/com,****************************************************************************
/com,*************************    SOLUTION       ********************************
/com,****************************************************************************
/solu
antype,0                   ! static analysis
_thickRatio=  0     ! Ratio of thick parts in the model
eqsl,sparse,,,,,1
cntr,print,1               ! print out contact info and also make no initial contact an error
cncheck,dmp		!	Enable program controlled contact splitting for distributed memory parallel run
dmpoption,emat,no             ! Don't combine emat file for DANSYS
dmpoption,esav,no             ! Don't combine esav file for DANSYS
nldiag,cont,iter           ! print out contact info each equilibrium iteration
rescontrol,,none                 ! Do not keep any restart files
/com,****************************************************
/com,******************* SOLVE FOR LS 1 OF 2 ****************
d,3333,ux,0.
d,3333,uy,0.
d,3333,uz,0.
d,3333,rotx,0.
d,3333,roty,0.
d,3333,rotz,0.
d,3334,ux,%_loadvari136ux%
d,3334,rotx,%_loadvari136rotx%
d,3334,rotz,%_loadvari136rotz%
nsub,1,1,1
time,1.
outres,erase
outres,all,none
outres,nsol,all,
outres,rsol,all
outres,eangl,all
outres,etmp,all
outres,veng,all
outres,strs,all,
outres,epel,all,
outres,eppl,all,
outres,cont,all,
! *********** WB SOLVE COMMAND ***********
! check interactive state
*get,ANSINTER_,active,,int
*if,ANSINTER_,ne,0,then
/eof
*endif
solve
/com *************** Write FE CONNECTORS *********
CEWRITE,file,ce,,INTE
/com,****************************************************
/com,*************** FINISHED SOLVE FOR LS 1 *************
/com,****************************************************
/com,******************* SOLVE FOR LS 2 OF 2 ****************
nsub,1,1,1
time,2.
outres,erase
outres,all,none
outres,nsol,all,
outres,rsol,all
outres,eangl,all
outres,etmp,all
outres,veng,all
outres,strs,all,
outres,epel,all,
outres,eppl,all,
outres,cont,all,
solve
/com,****************************************************
/com,*************** FINISHED SOLVE FOR LS 2 *************
*get,_NSOLTHREADS,active,0,ntfs
*get,_NSOLPROCESSES,active,0,npfs
/post1
fini
