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/COM,ANSYS RELEASE 2025 R1           BUILD 25.1      UP20241202       09:41:28
/PREP7
/TITLE,global_local--Static Structural (A5)
ANTYPE, 0
EQSLV,PCG , 1.000000000E-08,,
TOFFST,  273.150000
DMPOPT,ESAV,NO
DMPOPT,EMAT,NO
*IF,_CDRDOFF,EQ,1,THEN     !if solid model was read in
_CDRDOFF=             !reset flag, numoffs already performed
*ELSE              !offset database for the following FE model
NUMOFF,NODE,     3291
NUMOFF,ELEM,      580
NUMOFF,MAT ,        1
NUMOFF,TYPE,        1
*ENDIF
*SET,ANSINTER_,  2.000000000000
*SET,TEMPERATURE,'TEMP                            '
*SET,_ASMDIAG,  23.46260655277
*SET,_BUTTON ,  0.000000000000
*SET,_GUI_CLR_BG,' systemButtonFace               '
*SET,_GUI_CLR_FG,' systemButtonText               '
*SET,_GUI_CLR_INFOBG,' systemInfoBackground           '
*SET,_GUI_CLR_SEL,' systemHighlight                '
*SET,_GUI_CLR_SELBG,' systemHighlight                '
*SET,_GUI_CLR_SELFG,' systemHighlightText            '
*SET,_GUI_CLR_WIN,' systemWindow                   '
*SET,_GUI_FNT_FMLY,'Arial                           '
*SET,_GUI_FNT_PXLS,  16.00000000000
*SET,_GUI_FNT_SLNT,'r                               '
*SET,_GUI_FNT_WEGT,'medium                          '
*SET,_MAXELEMNUM,  580.0000000000
*SET,_MAXELEMTYPE,  1.000000000000
*SET,_MAXNODENUM,  3291.000000000
*SET,_NUMELEM,  580.0000000000
*SET,_NUMNODE,  3291.000000000
*SET,_RETURN ,  0.000000000000
*SET,_STATUS ,  1.000000000000
*SET,_THICKRATIO,  1.000000000000
*SET,_UIQR   ,'                                '
*SET,_WALLBSOL,  9.687777777778
*SET,_WALLSTRT,  9.687777777778
*SET,_WB_PROJECTSCRATCH_DIR(1,       1,       1),'C:\Users\gbarkoul\Global_local_1\Mechanical\global_local_files\dp0\SYS\MECH\                                                                                                                                                                            '
*SET,_WB_SOLVERFILES_DIR(1,       1,       1),'C:\Users\gbarkoul\Global_local_1\Mechanical\global_local_files\dp0\SYS\MECH\                                                                                                                                                                            '
*SET,_WB_USERFILES_DIR(1,       1,       1),'C:\Users\gbarkoul\Global_local_1\Mechanical\global_local_files\user_files\                                                                                                                                                                              '
*SET,_XMAX   ,  2.580000000000
*SET,_XMIN   , -2.420000000000
*SET,_YMAX   ,  9.875000000000
*SET,_YMIN   , -9.875000000000
*SET,_Z1     ,  0.000000000000
*SET,_Z10    ,  0.000000000000
*SET,_Z11    ,  0.000000000000
*SET,_Z12    ,  0.000000000000
*SET,_Z13    ,  0.000000000000
*SET,_Z14    ,  0.000000000000
*SET,_Z15    ,  0.000000000000
*SET,_Z16    ,  0.000000000000
*SET,_Z17    ,  0.000000000000
*SET,_Z18    ,  0.000000000000
*SET,_Z19    ,  0.000000000000
*SET,_Z20    ,  0.000000000000
*SET,_Z21    ,  0.000000000000
*SET,_Z30    ,  0.000000000000
*SET,_Z31    ,  0.000000000000
*SET,_Z32    ,  0.000000000000
*SET,_ZMAX   ,  5.818750000000
*SET,_ZMIN   , -5.818750000000
DOF,DELETE
ETBLOCK,        1,        1
(2i9,19a9)
        1      186        0        1        0        0        0        0        0        0        0        0        0        0        0        0        0        0        0        0        0
       -1
NBLOCK,6,SOLID,      3291,      3291
(3i9,6e21.13e3)
        1        0        0-1.4200000000000E+000 4.3855790680000E+000-2.1193361560000E+000
        2        0        0-4.2000000000000E-001 4.3855790680000E+000-2.1193361560000E+000
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N,UNBL,LOC,       -1,
EBLOCK,19,SOLID,       580,       580
(19i10)
         1         1         1         1         0         0         0         0        20         0         1         1       137       129        33       405       371       373       397
       923      1456      1089       920      2251      2249      2256      2297       924      1486      1457      1090
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        -1
CMBLOCK,BOTTOM_SIDE,NODE,     181  ! users node component definition
(8i10)
       511       512       513       514       515       516       517       518
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CMBLOCK,RIGHT_SIDE,NODE,     209  ! users node component definition
(8i10)
       521       522       523       524       545       546       547       548
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CMBLOCK,TOP_SIDE,NODE,      96  ! users node component definition
(8i10)
       553       554       555       556       557       558       559       560
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MPTEMP,UNBL, 1, 1,  0.00000000    ,
MPDATA,UNBL, 1,EX  ,       1, 1,  200000.000    ,
MPTEMP,UNBL, 1, 1,  0.00000000    ,
MPDATA,UNBL, 1,NUXY,       1, 1, 0.300000000    ,
MPTEMP,UNBL, 1, 1,  0.00000000    ,
MPDATA,UNBL, 1,ALPX,       1, 1, 1.200000000E-05,
MPTEMP,UNBL, 1, 1,  0.00000000    ,
MPDATA,UNBL, 1,DENS,       1, 1, 7.850000000E-09,
MPTEMP,UNBL, 1, 1,  0.00000000    ,
MPDATA,UNBL, 1,KXX ,       1, 1,  60.5000000    ,
MPTEMP,UNBL, 1, 1,  0.00000000    ,
MPDATA,UNBL, 1,RSVX,       1, 1, 1.700000000E-04,
MPTEMP,UNBL, 1, 1,  0.00000000    ,
MPDATA,UNBL, 1,C   ,       1, 1,  434000000.    ,
MPTEMP,UNBL, 1, 1,  0.00000000    ,
MPDATA,UNBL, 1,MURX,       1, 1,  10000.0000    ,
MPTEMP,UNBL,16, 1,  1.00000000    ,  2.00000000    ,  3.00000000
MPTEMP,UNBL,16, 4,  4.00000000    ,  5.00000000    ,  6.00000000
MPTEMP,UNBL,16, 7,  7.00000000    ,  8.00000000    ,  9.00000000
MPTEMP,UNBL,16,10,  10.0000000    ,  11.0000000    ,  12.0000000
MPTEMP,UNBL,16,13,  13.0000000    ,  14.0000000    ,  15.0000000
MPTEMP,UNBL,16,16,  16.0000000    ,
MPDATA,UNBL,16,UMID,       1, 1, 892940336.0    , 845231929.0    , 758591843.0
MPDATA,UNBL,16,UMID,       1, 4, 841823282.0    , 946154809.0    , 808870445.0
MPDATA,UNBL,16,UMID,       1, 7, 892691511.0    , 1684170085.    , 825241701.0
MPDATA,UNBL,16,UMID,       1,10, 538976288.0    , 538976288.0    , 538976288.0
MPDATA,UNBL,16,UMID,       1,13, 538976288.0    , 538976288.0    , 538976288.0
MPDATA,UNBL,16,UMID,       1,16, 538976288.0    ,
MPTEMP,UNBL,16, 1,  1.00000000    ,  2.00000000    ,  3.00000000
MPTEMP,UNBL,16, 4,  4.00000000    ,  5.00000000    ,  6.00000000
MPTEMP,UNBL,16, 7,  7.00000000    ,  8.00000000    ,  9.00000000
MPTEMP,UNBL,16,10,  10.0000000    ,  11.0000000    ,  12.0000000
MPTEMP,UNBL,16,13,  13.0000000    ,  14.0000000    ,  15.0000000
MPTEMP,UNBL,16,16,  16.0000000    ,
MPDATA,UNBL,16,UVID,       1, 1, 875968560.0    , 1667589681.    , 758473318.0
MPDATA,UNBL,16,UVID,       1, 4, 1680684080.    , 1684286776.    , 926363949.0
MPDATA,UNBL,16,UVID,       1, 7, 892351333.0    , 943220025.0    , 1681406003.
MPDATA,UNBL,16,UVID,       1,10, 538976288.0    , 538976288.0    , 538976288.0
MPDATA,UNBL,16,UVID,       1,13, 538976288.0    , 538976288.0    , 538976288.0
MPDATA,UNBL,16,UVID,       1,16, 538976288.0    ,
EXTOPT,ATTR,      0,      0,      0
EXTOPT,ESIZE,  0,  0.0000
EXTOPT,ACLEAR,      0
TREF,  22.0000000
IRLF,  0
BFUNIF,TEMP,_TINY
ACEL,  0.00000000    ,  0.00000000    ,  0.00000000
OMEGA,  0.00000000    ,  0.00000000    ,  0.00000000
DOMEGA,  0.00000000    ,  0.00000000    ,  0.00000000
CGLOC,  0.00000000    ,  0.00000000    ,  0.00000000
CGOMEGA,  0.00000000    ,  0.00000000    ,  0.00000000
DCGOMG,  0.00000000    ,  0.00000000    ,  0.00000000
NLDIAG,EFLG,OFF
NLDIAG,NRRE,OFF
NLDIAG,CONT,ITER

NSUBST,         1,         1,         1,
KUSE,     0
TIME,  1.00000000
ALPHAD,  0.00000000
BETAD,  0.00000000
DMPRAT,  0.00000000
DMPSTR,  0.00000000

CRPLIM, 0.100000000    ,   0
CRPLIM,  0.00000000    ,   1
NCNV,     1,  0.00000000    ,     0,  0.00000000    ,  0.00000000
NEQIT,     0

ERESX,DEFA
OUTRES, ALL,NONE,
OUTRES,NSOL, ALL,
OUTRES,RSOL, ALL,
OUTRES,EANG, ALL,
OUTRES,ETMP, ALL,
OUTRES,VENG, ALL,
OUTRES,STRS, ALL,
OUTRES,EPEL, ALL,
OUTRES,EPPL, ALL,
OUTRES,CONT, ALL,
FINISH
