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wbnew--Static Structural 2                                              S      1
/COM,ANSYS RELEASE 2022 R2           BUILD 22.2      UP20220516       11S      2
/PREP7                                                                  S      4
/TITLE,wbnew--Static Structural 2                                       S      5
*SET,ANSINTER_,2.000000000000                                           S      6
*SET,TEMPERATURE,'TEMP'                                                 S      7
*SET,_BUTTON,0.000000000000                                             S      8
*SET,_GUI_CLR_BG,'systemButtonFace'                                     S      9
*SET,_GUI_CLR_FG,'systemButtonText'                                     S     10
*SET,_GUI_CLR_INFOBG,'systemInfoBackground'                             S     11
*SET,_GUI_CLR_SEL,'systemHighlight'                                     S     12
*SET,_GUI_CLR_SELBG,'systemHighlight'                                   S     13
*SET,_GUI_CLR_SELFG,'systemHighlightText'                               S     14
*SET,_GUI_CLR_WIN,'systemWindow'                                        S     15
*SET,_GUI_FNT_FMLY,'Arial'                                              S     16
*SET,_GUI_FNT_PXLS,16.00000000000                                       S     17
*SET,_GUI_FNT_SLNT,'r'                                                  S     18
*SET,_GUI_FNT_WEGT,'medium'                                             S     19
*SET,_REMOTE_IP,'localhost'                                             S     20
*SET,_RETURN,0.000000000000                                             S     21
*SET,_STATUS,0.000000000000                                             S     22
*SET,_UIQR,1.000000000000                                               S     23
*SET,_WALLSTRT,11.88388888889                                           S     24
*SET,_WB_PROJECTSCRATCH_DIR(1,1,1),'C:\Users\jbronson\AppData\Local\TempS     26
*SET,_WB_SOLVERFILES_DIR(1,1,1),'C:\Users\jbronson\AppData\Local\Temp\WBS     28
*SET,_WB_USERFILES_DIR(1,1,1),'C:\Users\jbronson\AppData\Local\Temp\WB_jS     30
TREF,0.00000000                                                         S     31
IRLF,0                                                                  S     32
BFUNIF,TEMP,_TINY                                                       S     33
ACEL,0.00000000,0.00000000,0.00000000                                   S     34
OMEGA,0.00000000,0.00000000,0.00000000                                  S     35
DOMEGA,0.00000000,0.00000000,0.00000000                                 S     36
CGLOC,0.00000000,0.00000000,0.00000000                                  S     37
CGOMEGA,0.00000000,0.00000000,0.00000000                                S     38
DCGOMG,0.00000000,0.00000000,0.00000000                                 S     39
KUSE,0                                                                  S     40
TIME,0.00000000                                                         S     41
ALPHAD,0.00000000                                                       S     42
BETAD,0.00000000                                                        S     43
DMPRAT,0.00000000                                                       S     44
DMPSTR,0.00000000                                                       S     45
CRPLIM,0.100000000,0                                                    S     46
CRPLIM,0.00000000,1                                                     S     47
NCNV,1,0.00000000,0,0.00000000,0.00000000                               S     48
NEQIT,0                                                                 S     49
ERESX,DEFA                                                              S     50
/AUX15                                                                  S     51
IOPTN,YES,DEFA                                                          S     52
!_END_OF_START                                                          S     54
1H,,1H;,,11HD:/OneDrive,                                                G      1
5HANSYS,22H  22.2      UP20220516,,,,,,,1.0,1,,,,13H000203.115506,      G      2
1.0000E-04,,,,9,,;                                                      G      3
S     54G      3D      0P      0                                        T      1
:CDWRITE      ! START OF CDWRITE DATA
/COM,ANSYS RELEASE 2022 R2           BUILD 22.2      UP20220516       11:55:07
/PREP7
/TITLE,wbnew--Static Structural 2
*IF,_CDRDOFF,EQ,1,THEN     !if solid model was read in
_CDRDOFF=             !reset flag, numoffs already performed
*ELSE              !offset database for the following FE model
NUMOFF,NODE,    15689
NUMOFF,ELEM,    12369
NUMOFF,MAT ,        1
NUMOFF,TYPE,        1
*ENDIF
*SET,ANSINTER_,  2.000000000000
*SET,TEMPERATURE,'TEMP                            '
*SET,_BUTTON ,  0.000000000000
*SET,_GUI_CLR_BG,' systemButtonFace               '
*SET,_GUI_CLR_FG,' systemButtonText               '
*SET,_GUI_CLR_INFOBG,' systemInfoBackground           '
*SET,_GUI_CLR_SEL,' systemHighlight                '
*SET,_GUI_CLR_SELBG,' systemHighlight                '
*SET,_GUI_CLR_SELFG,' systemHighlightText            '
*SET,_GUI_CLR_WIN,' systemWindow                   '
*SET,_GUI_FNT_FMLY,'Arial                           '
*SET,_GUI_FNT_PXLS,  16.00000000000
*SET,_GUI_FNT_SLNT,'r                               '
*SET,_GUI_FNT_WEGT,'medium                          '
*SET,_REMOTE_IP,'localhost                       '
*SET,_RETURN ,  0.000000000000
*SET,_STATUS ,  1.000000000000
*SET,_UIQR   ,  1.000000000000
*SET,_WALLSTRT,  11.88388888889
*SET,_WB_PROJECTSCRATCH_DIR(1,       1,       1),'C:\Users\jbronson\AppData\Local\Temp\WB_jbronson_12080_2\wbnew_files\dp0\SYS-1\MECH\                                                                                                                                                                    '
*SET,_WB_SOLVERFILES_DIR(1,       1,       1),'C:\Users\jbronson\AppData\Local\Temp\WB_jbronson_12080_2\wbnew_files\dp0\SYS-1\MECH\                                                                                                                                                                    '
*SET,_WB_USERFILES_DIR(1,       1,       1),'C:\Users\jbronson\AppData\Local\Temp\WB_jbronson_12080_2\wbnew_files\user_files\                                                                                                                                                                        '
DOF,DELETE
ET,        1,200
KEYOP,        1, 1,       10
NBLOCK,6,SOLID,     15689,     15689
(3i9,6e21.13e3)
        1        0        0 1.8682579350000E-001 4.9876214570000E+000-4.1358778780000E-001
        2        0        0 1.7584742520000E-001 4.9877530200000E+000-4.1285225710000E-001
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N,UNBL,LOC,       -1,
EBLOCK,19,SOLID,     12369,     12369
(19i10)
         1         1         1         1         0         0         0         0         8         0         1         1         2         4         3         5         6         8         7
         1         1         1         1         0         0         0         0         8         0         2         5         6         8         7         9        10        12        11
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        -1
CMBLOCK,FIRTREE1,NODE,      80  ! users node component definition
(8i10)
      1755      1757      1759      1761      1763      6269     13134     13135
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CMBLOCK,FIRTREE2,NODE,      80  ! users node component definition
(8i10)
      2083      2085      2091      2095      2099      7772     12025     12026
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CMBLOCK,FIRTREE3,NODE,      80  ! users node component definition
(8i10)
       367       617       618       619       620       706       707       708
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CMBLOCK,FIRTREE4,NODE,      80  ! users node component definition
(8i10)
      1182      1184      1186      1188      1190      1267      1269      1271
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CMBLOCK,PRESSURE_SURF,NODE,    2701  ! users node component definition
(8i10)
       520       521       522       523       524       560       561       562
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MPTEMP,UNBL, 1, 1,-1.138842107E-14,
MPDATA,UNBL, 1,EX  ,       1, 1,  29007547.5    ,
MPTEMP,UNBL, 1, 1,-1.138842107E-14,
MPDATA,UNBL, 1,NUXY,       1, 1, 0.300000000    ,
MPTEMP,UNBL, 1, 1,-1.138842107E-14,
MPDATA,UNBL, 1,ALPX,       1, 1, 6.666666667E-06,
MPTEMP,UNBL, 1, 1,-1.138842107E-14,
MPDATA,UNBL, 1,DENS,       1, 1, 7.345444929E-04,
MPTEMP,UNBL, 1, 1,-1.138842107E-14,
MPDATA,UNBL, 1,KXX ,       1, 1,  7.55607836    ,
MPTEMP,UNBL, 1, 1,-1.138842107E-14,
MPDATA,UNBL, 1,RSVX,       1, 1,  8.52348993    ,
MPTEMP,UNBL, 1, 1,-1.138842107E-14,
MPDATA,UNBL, 1,C   ,       1, 1,  373722.970    ,
MPTEMP,UNBL, 1, 1,-1.138842107E-14,
MPDATA,UNBL, 1,MURX,       1, 1,  10000.0000    ,
MPTEMP,UNBL,16, 1,  1.00000000    ,  2.00000000    ,  3.00000000
MPTEMP,UNBL,16, 4,  4.00000000    ,  5.00000000    ,  6.00000000
MPTEMP,UNBL,16, 7,  7.00000000    ,  8.00000000    ,  9.00000000
MPTEMP,UNBL,16,10,  10.0000000    ,  11.0000000    ,  12.0000000
MPTEMP,UNBL,16,13,  13.0000000    ,  14.0000000    ,  15.0000000
MPTEMP,UNBL,16,16,  16.0000000    ,
MPDATA,UNBL,16,UMID,       1, 1, 892940336.0    , 845231929.0    , 758591843.0
MPDATA,UNBL,16,UMID,       1, 4, 841823282.0    , 946154809.0    , 808870445.0
MPDATA,UNBL,16,UMID,       1, 7, 892691511.0    , 1684170085.    , 825241701.0
MPDATA,UNBL,16,UMID,       1,10, 538976288.0    , 538976288.0    , 538976288.0
MPDATA,UNBL,16,UMID,       1,13, 538976288.0    , 538976288.0    , 538976288.0
MPDATA,UNBL,16,UMID,       1,16, 538976288.0    ,
MPTEMP,UNBL,16, 1,  1.00000000    ,  2.00000000    ,  3.00000000
MPTEMP,UNBL,16, 4,  4.00000000    ,  5.00000000    ,  6.00000000
MPTEMP,UNBL,16, 7,  7.00000000    ,  8.00000000    ,  9.00000000
MPTEMP,UNBL,16,10,  10.0000000    ,  11.0000000    ,  12.0000000
MPTEMP,UNBL,16,13,  13.0000000    ,  14.0000000    ,  15.0000000
MPTEMP,UNBL,16,16,  16.0000000    ,
MPDATA,UNBL,16,UVID,       1, 1, 1647784249.    , 1684365670.    , 758265958.0
MPDATA,UNBL,16,UVID,       1, 4, 1663906865.    , 912469304.0    , 1697801773.
MPDATA,UNBL,16,UVID,       1, 7, 929379381.0    , 1717790009.    , 828649785.0
MPDATA,UNBL,16,UVID,       1,10, 538976288.0    , 538976288.0    , 538976288.0
MPDATA,UNBL,16,UVID,       1,13, 538976288.0    , 538976288.0    , 538976288.0
MPDATA,UNBL,16,UVID,       1,16, 538976288.0    ,
EXTOPT,ATTR,      0,      0,      0
EXTOPT,ESIZE,  0,  0.0000
EXTOPT,ACLEAR,      0
TREF,  0.00000000
IRLF,  0
BFUNIF,TEMP,_TINY
ACEL,  0.00000000    ,  0.00000000    ,  0.00000000
OMEGA,  0.00000000    ,  0.00000000    ,  0.00000000
DOMEGA,  0.00000000    ,  0.00000000    ,  0.00000000
CGLOC,  0.00000000    ,  0.00000000    ,  0.00000000
CGOMEGA,  0.00000000    ,  0.00000000    ,  0.00000000
DCGOMG,  0.00000000    ,  0.00000000    ,  0.00000000

KUSE,     0
TIME,  0.00000000
ALPHAD,  0.00000000
BETAD,  0.00000000
DMPRAT,  0.00000000
DMPSTR,  0.00000000
CRPLIM, 0.100000000    ,   0
CRPLIM,  0.00000000    ,   1
NCNV,     1,  0.00000000    ,     0,  0.00000000    ,  0.00000000
NEQIT,     0

ERESX,DEFA
FINISH
