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/batch
! ANSYS input file written by Workbench version 18.0 ALPHA
! File used for geometry attach: D:\scratch\ssosc\wbproject\oscplate_steady_files\dp0\SYS\DM\SYS.agdb
/title,oscplate_steady--Static Structural (A5)
/com,--- Data in consistent MKS units. See Solving Units in the help system for more information.
/units,MKS
/prep7
! Turn off shape checking because checks already performed inside WB mesher.
! See help system for more information.
SHPP,OFF,,NOWARN
etcon,set             ! allow ANSYS to choose best KEYOP's for 180x elements
/com,*********** Nodes for the whole assembly ***********
nblock,3
(1i9,3e20.9e3)
        1    1.000000000E+001    0.000000000E+000    4.000000000E-001
        2    1.000000000E+001    0.000000000E+000    0.000000000E+000
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-1
/com,*********** Elements for Body 1 "solid" ***********
et,1,187
eblock,19,solid,,8168
(19i9)
        1        1        1        1        0        0        0        0       10        0        1     1156     1819     1631     1798    10097    12756    10094    10096
    13113    12755
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-1
/com,*********** Send User Defined Coordinate System(s) ***********
csys,0
toffst,273.15,  ! Temperature offset from absolute zero
/com,*********** Set Reference Temperature ***********
tref,22.
/com,*********** Send Materials ***********
MP,DENS,1,2550,	! kg m^-3
MP,ALPX,1,1.2e-05,	! C^-1
MP,C,1,434,	! J kg^-1 C^-1
MP,KXX,1,60.5,	! W m^-1 C^-1
MP,RSVX,1,1.7e-07,	! kg m^3 A^-2 s^-3
MP,EX,1,4000000.0,	! C^-1
MP,NUXY,1,0.35,
MP,MURX,1,10000,

!************************* Model Summary ********************
!solid,	plate,	matid,	1
!************************* End Model Summary ********************
/com,*********** Fixed Supports ***********
CMBLOCK,_FIXEDSU,NODE,      145
(8i10)
         1         2         3         4         5         6         7         8
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cmsel,s,_FIXEDSU
d,all,all
nsel,all
/com,*********** Create FSI Flags ***********
CMBLOCK,FSIN_1  ,NODE,     3929
(8i10)
         1         2         3         4         5         6         7         8
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SF,FSIN_1,FSIN,1
nsel,all
fini
/com,****************************************************************************
/com,*************************    SOLUTION       ********************************
/com,****************************************************************************
/solu
antype,0                   ! static analysis
eqsl,pcg,1e-8,,,,,,1
cntr,print,1               ! print out contact info and also make no initial contact an error
rstsuppress,none           ! don't suppress anything due to presense of FSI loading
dmpopt,emat,no             ! Don't combine emat file for DANSYS
dmpopt,esav,no             ! Don't combine esav file for DANSYS
cmwrite                    ! Export components due to presence of FSI loading
nldiag,cont,iter           ! print out contact info each equilibrium iteration
resc,linear,last           ! Turn on restart files due to presence of FSI loads
scopt,,no                  ! Activate mid-side node transfer from APDL to SC
/com,****************************************************
/com,******************* SOLVE FOR LS 1 OF 1 ****************
nsub,1,1,1
time,1.
outres,erase
outres,all,none
outres,nsol,all
outres,rsol,all
outres,strs,all
outres,epel,all
outres,eppl,all
stabilize,off                   ! Stabilization turned OFF by user
! *********** WB SOLVE COMMAND ***********
! check interactive state
*get,ANSINTER_,active,,int
*if,ANSINTER_,ne,0,then
/eof
*endif
solve
/com *************** Write FE CONNECTORS *********
CEWRITE,file,ce,,INTE
/com,****************************************************
/com,*************** FINISHED SOLVE FOR LS 1 *************
*set,_DS_PROGRESS          ! turn off progress updates to avoid virus scanning bug
*get,_PCGITER,active,,solu,cgiter
/post1
fini
