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/COM,ANSYS RELEASE                   BUILD  0.0      UP00000000       00:00:00
/PREP7
/TITLE,turek--Transient (A5)
TOFFST,  273.150000
*IF,_CDRDOFF,EQ,1,THEN     !if solid model was read in
_CDRDOFF=             !reset flag, numoffs already performed
*ELSE              !offset database for the following FE model
NUMOFF,NODE,     2853
NUMOFF,ELEM,      360
NUMOFF,MAT ,        1
NUMOFF,TYPE,        1
*ENDIF
*SET,PORT    ,  50053.00000000
*SET,_ASMDIAG, 0.3517217139790
*SET,_MAXELEMNUM,  360.0000000000
*SET,_MAXELEMTYPE,  1.000000000000
*SET,_MAXNODENUM,  2853.000000000
*SET,_MAXREALCONST,  1.000000000000
*SET,_NUMELEM,  360.0000000000
*SET,_NUMNODE,  2853.000000000
*SET,_RETURN ,  0.000000000000
*SET,_STATUS ,  0.000000000000
*SET,_UIQR   ,'WINDOWS x64                     '
*SET,_WALLBSOL, 0.1410825750000E-02
*SET,_WALLSTRT, 0.1400591222222E-02
*SET,_WB_PROJECTSCRATCH_DIR(1,       1,       1),'D:\backedup\SystemCoupling\TestCases\FSI\Turek\FromRyan\WB\turek_files\dp0\SYS\MECH\                                                                                                                                                                    '
*SET,_WB_SOLVERFILES_DIR(1,       1,       1),'D:\backedup\SystemCoupling\TestCases\FSI\Turek\FromRyan\WB\turek_files\dp0\SYS\MECH\                                                                                                                                                                    '
*SET,_WB_USERFILES_DIR(1,       1,       1),'D:\backedup\SystemCoupling\TestCases\FSI\Turek\FromRyan\WB\turek_files\user_files\                                                                                                                                                                      '
*SET,_XMAX   , 0.6000000000000
*SET,_XMIN   , 0.2489897949000
*SET,_YMAX   , 0.2100000000000
*SET,_YMIN   , 0.1900000000000
*SET,_ZMAX   , 0.1000000000000E-01
*SET,_ZMIN   ,  0.000000000000
*SET,__PYMAPDL_SESSION_ID__,'e0eabb6930cc4275bfe53c89735     '
DOF,DELETE
ETBLOCK,        1,        1
(2i9,19a9)
        1      186        0        1        0        0        0        0        0        0        0        0        0        0        0        0        0        0        0        0        0
       -1
NBLOCK,6,SOLID,      2853,      2853
(3i9,6e21.13e3)
        1        0        0 5.9415916960000E-001 2.0666708540000E-001
        2        0        0 5.9416479030000E-001 2.0333366850000E-001
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N,UNBL,LOC,       -1,
EBLOCK,19,SOLID,       360,       360
(19i10)
         1         1         1         1         0         0         0         0        20         0         1       295       723       724       854       296       717       716       591
      1802      2722      2724      1803      1807      2709      2459      1806      1801      2712      2710      2460
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        -1
CMBLOCK,FSIN_1  ,NODE,      13  ! users node component definition
(8i10)
       591      -716       721       724       729      -854      2458     -2708
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CMBLOCK,_DISPZEROUZ,NODE,     663  ! users node component definition
(8i10)
         1      -715       730      -856       858      -861       863      -865
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CMBLOCK,_FIXEDSU,NODE,       6  ! users node component definition
(8i10)
       716      -729      2709     -2723      2725     -2728
MPTEMP,UNBL, 1, 1,  0.00000000    ,
MPDATA,UNBL, 1,EX  ,       1, 1,  1400000.00    ,
MPTEMP,UNBL, 1, 1,  0.00000000    ,
MPDATA,UNBL, 1,NUXY,       1, 1, 0.400000000    ,
MPTEMP,UNBL, 1, 1,  0.00000000    ,
MPDATA,UNBL, 1,DENS,       1, 1,  10000.0000    ,
EXTOPT,ATTR,      0,      0,      0
EXTOPT,ESIZE,  0,  0.0000
EXTOPT,ACLEAR,      0
TREF,  22.0000000
IRLF,  0
BFUNIF,TEMP,_TINY
ACEL,  0.00000000    ,  0.00000000    ,  0.00000000
OMEGA,  0.00000000    ,  0.00000000    ,  0.00000000
DOMEGA,  0.00000000    ,  0.00000000    ,  0.00000000
CGLOC,  0.00000000    ,  0.00000000    ,  0.00000000
CGOMEGA,  0.00000000    ,  0.00000000    ,  0.00000000
DCGOMG,  0.00000000    ,  0.00000000    ,  0.00000000

KUSE,     0
TIME,  0.00000000
ALPHAD,  0.00000000
BETAD,  0.00000000
DMPRAT,  0.00000000
DMPSTR,  0.00000000

CRPLIM, 0.100000000    ,   0
CRPLIM,  0.00000000    ,   1
NCNV,     1,  0.00000000    ,     0,  0.00000000    ,  0.00000000
NEQIT,     0

ERESX,DEFA
DBLOCK,      2499
(i9,a6,2(pg16.9))
        1  UZ    0.00000000      0.00000000
        2  UZ    0.00000000      0.00000000
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       -1
SFEBLOCK,4,FSIN,       360,      1984,0
(i9,i4,i4,6(pg20.9))
        1   4   1      1.00000000          1.00000000          1.00000000          1.00000000
        1   4   2      0.00000000          0.00000000          0.00000000          0.00000000
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SFE,end,LOC,       -1,
FINISH
